<?xml version="1.0"?>


<!--


  ****************** IMPORTANT NOTICES **********************

   This is an alpha version release of the DATCOM+ program for
   JSBSIM. Nothing, and I do mean NOTHING, as been checked to
   verify that the parameters, units, sign conventions, or
   basically anything else is correct. Your mileage may vary.

   ***********************************************************

   This file was generated by Datcom+, a superset of
    the USAF Digital DATCOM program.
   This file is considered an intermediary file in the
   DATCOM/JSBSim process. This file may be overwritten without
   warning, so any changes that you make in here may be lost.

   If you intend to use this file as it is and modify it, make
   sure that you take the necessary precautions to prevent it
   from being overwritten, like renaming it.


   ***********************************************************


   DISCLAIMER REQUIRED BY HQ USAF FOR PUBLIC RELEASE APPROVAL

   THIS SOFTWARE AND ANY ACCOMPANYING DOCUMENTATION
   IS RELEASED "AS IS".  THE U.S. GOVERNMENT MAKES NO
   WARRANTY OF ANY KIND, EXPRESS OR IMPLIED, CONCERNING
   THIS SOFTWARE AND ANY ACCOMPANYING DOCUMENTATION,
   INCLUDING, WITHOUT LIMITATION, ANY WARRANTIES OF
   MERCHANTABILITY OR FITNESS FOR A PARTICULAR PURPOSE.
   IN NO EVENT WILL THE U.S. GOVERNMENT BE LIABLE FOR ANY
   DAMAGES, INCLUDING LOST PROFITS, LOST SAVINGS OR OTHER
   INCIDENTAL OR CONSEQUENTIAL DAMAGES ARISING OUT OF THE
   USE, OR INABILITY TO USE, THIS SOFTWARE OR ANY
   ACCOMPANYING DOCUMENTATION, EVEN IF INFORMED IN ADVANCE
   OF THE POSSIBILITY OF SUCH DAMAGES.


   ***********************************************************
-->


<!-- **********************************************************************
        AERODYNAMICS
     **********************************************************************
-->


   <aerodynamics>

       <alphalimits unit="DEG">
           <min>  -16.00    </min>
           <max>   24.00    </max>
       </alphalimits>


       <!-- *************************
                Sign Conventions
           *************************

           Control displacements
                Stick    FWD  + / Aft -
                Stick    Left + / Right -
                Wheel    CCW  + / CW -
                Pedal    Left + / Right -
                Elevator trim Nose Up + / Nose down -

           Surfaces
                Elevator  TED + / TEU -
                R Ail     TED + / TEU -
                L Ail     TED + / TEU -
                Rudder    TEL + / TER -

           F&M, Accel, Rates, Displacements
                Pitch     Up  + / Down -
                Roll      Rgt + / Left -
                Yaw       Rgt + / Left -

           Other
                Alpha     Up  + / Down -
                Beta Wind in right ear + / Wind in left ear -
                Slip Ball right of center + / left of center -
      -->


      <!-- **************************************
                ASSUMPTIONS AND LIMITATIONS

           There is no interaction between deflected surfaces modeled
           so there is no change in elevator effects with the flaps
           deflected, for example.

           Terms known to be missing from DATCOM:
              Power effects
              Ground effects
              Cyr, CyDr, Cyda, ClDr, Cndr

           **************************************
      -->


      <!--
           The following ground effect tables are NOT generated
           by DATCOM, but provide representative effects.
           These terms are not currently used in this model.
      -->


<!-- ********************************************************************** -->


     <axis name="LIFT">


         <!--modified. Not sure about ground effect property...-->
         <function name="aero/coefficient/CLwbh">
             <description>
                 Lift due to alpha
                 Increase in CL decreases Period and damping,Dutch Roll damping
                 CL is low for landing
             </description>
             <product>
                 <property>aero/function/ground-effect-factor-lift</property>
                 <property>aero/qbar-psf</property>
                 <property>metrics/Sw-sqft</property>
                 <table>
                     <independentVar lookup="row">aero/alpha-deg</independentVar>
                     <tableData>
                         0.00     0.000
                         4.00     1.126
                         8.00     2.352
                         12.00     3.758
                         16.00     5.176
                         20.00     6.492
                         24.00     7.597
                         28.00     8.624
                     </tableData>
                 </table>
             </product>
         </function>

         <!-- NOT IN MISSILE-DATCOM OUTPUT
         <function name="aero/coefficient/CLq">
            <description>
               Basic Lift Coefficient due to pitch rate(per degree)
            </description>
            <product>
               <property>velocities/q-aero-rad_sec</property>
               <value>57.29577951</value>
               <property>aero/qbar-psf</property>
               <property>metrics/Sw-sqft</property>
               <property>aero/ci2vel</property>
               <table>
                  <independentVar lookup="row">aero/alpha-deg</independentVar>
                  <tableData>
                       -16.00         .6987E-01
                       -8.000         .6987E-01
                       -6.000         .6987E-01
                       -4.000         .6987E-01
                       -2.000         .6987E-01
                         .000         .6987E-01
                        2.000         .6987E-01
                        4.000         .6987E-01
                        8.000         .6987E-01
                        9.000         .6987E-01
                        10.00         .6987E-01
                        12.00         .6987E-01
                        14.00         .6987E-01
                        16.00         .6987E-01
                        18.00         .6987E-01
                        19.00         .6987E-01
                        20.00         .6987E-01
                        21.00         .6987E-01
                        22.00         .6987E-01
                        24.00         .6987E-01
                  </tableData>
               </table>
            </product>
         </function>
    -->

    <!-- NOT IN MISSILE-DATCOM OUTPUT
         <function name="aero/coefficient/CLad">
            <description>
               Basic Lift Coefficient due to AOA rate(per degree)
               Important contributor to Short-Period damping
               For low Cla, aircraft must land at high alpha
            </description>
            <product>
               <property>aero/alphadot-deg_sec</property>
               <property>aero/qbar-psf</property>
               <property>metrics/Sw-sqft</property>
               <property>aero/ci2vel</property>
               <table>
                  <independentVar lookup="row">aero/alpha-deg</independentVar>
                  <tableData>
                       -16.00         .9593E-02
                       -8.000         .1048E-01
                       -6.000         .1091E-01
                       -4.000         .1124E-01
                       -2.000         .1117E-01
                         .000         .1026E-01
                        2.000         .8897E-02
                        4.000         .6804E-02
                        8.000        -.3620E-02
                        9.000        -.9918E-02
                        10.00        -.2047E-01
                        12.00        -.2777E-01
                        14.00        -.1556E-01
                        16.00        -.1028E-01
                        18.00        -.1034E-01
                        19.00        -.1782E-01
                        20.00         .3564E-02
                        21.00         .3508E-02
                        22.00        -.1449E-01
                        24.00         .9153E-02
                  </tableData>
               </table>
            </product>
         </function>
    -->

     </axis>


<!-- ********************************************************************** -->


     <axis name="DRAG">


         <!-- modified -->
         <function name="aero/coefficient/CD">
             <description>
                 Basic Drag Coefficient
                 Sense: Always positive
                 Main contributor to Phugoid damping: Greater Cd, Better damping
             </description>
             <product>
                 <property>aero/function/ground-effect-factor-lift</property>
                 <property>aero/qbar-psf</property>
                 <property>metrics/Sw-sqft</property>
                 <table>
                     <independentVar lookup="row">aero/alpha-deg</independentVar>
                     <tableData>
                         0.00     0.371
                         4.00     0.450
                         8.00     0.703
                         12.00     1.173
                         16.00     1.860
                         20.00     2.742
                         24.00     3.765
                         28.00     4.973
                     </tableData>
                 </table>
             </product>
         </function>
     </axis>


<!-- ********************************************************************** -->

    <axis name="Force">

        <function name="aero/coefficient/CnDf2">
            <description>
                Normal force coefficient due to fin 2 deflection
            </description>
            <product>
                <property>aero/qbar-psf</property>
                <property>metrics/Sw-sqft</property>
                <property>metrics/bw-ft</property>
                <table>
                    <independentVar lookup="row">aero/alpha-deg</independentVar>
                    <independentVar lookup="column">fcs/fin2-pos-deg</independentVar>
                    <tableData>
                        0.0000     -25.0000   -20.0000   -15.0000   -10.0000   -5.0000    0.0000     5.0000     10.0000    15.0000    20.0000
                        0.0000     -2.3312    -1.9336    -1.4448    -0.9524    -0.4730    0.0000     0.4730     0.9524     1.4448     1.9336
                        4.0000     -1.1891    -0.7351    -0.2589    0.2104     0.6795     1.1543     1.6416     2.1483     2.6684     3.1013
                        8.0000     0.0865     0.5454     1.0019     1.4636     1.9363     2.4267     2.9422     3.4890     3.9562     4.3616
                        12.0000    1.5548     1.9941     2.4444     2.9109     3.4003     3.9201     4.4836     4.9842     5.4282     5.7982
                        16.0000    3.0378     3.4723     3.9274     4.4090     4.9248     5.4882     6.0275     6.5089     6.9247     7.2559
                        20.0000    4.4962     4.9352     5.4048     5.9119     6.4669     7.0384     7.5501     8.0064     8.3872     8.6735
                        24.0000    5.8542     6.3073     6.8017     7.3463     7.9377     8.4716     8.9625     9.3876     9.7251     9.9640
                        28.0000    7.2733     7.7498     8.2798     8.8762     9.4290     9.9490     10.4136    10.7996    11.0937    11.2688
                    </tableData>
                </table>
            </product>
        </function>

        <function name="aero/coefficient/CaDf2">
            <description>
                Axial force coefficient due to fin 2 deflection
            </description>
            <product>
                <property>aero/qbar-psf</property>
                <property>metrics/Sw-sqft</property>
                <property>metrics/bw-ft</property>
                <table>
                    <independentVar lookup="row">aero/alpha-deg</independentVar>
                    <independentVar lookup="column">fcs/fin2-pos-deg</independentVar>
                    <tableData>
                        0.0000     -25.0000   -20.0000   -15.0000   -10.0000   -5.0000    0.0000     5.0000     10.0000    15.0000    20.0000
                        0.0000     1.3698     1.0178     0.7269     0.5255     0.4093     0.3713     0.4093     0.5255     0.7269     1.0178
                        4.0000     1.1889     0.8578     0.6123     0.4538     0.3743     0.3707     0.4442     0.6007     0.8480     1.1634
                        8.0000     1.0039     0.7119     0.5097     0.3872     0.3402     0.3689     0.4779     0.6767     0.9509     1.2942
                        12.0000    0.8193     0.5743     0.4096     0.3198     0.3041     0.3658     0.5139     0.7444     1.0493     1.4166
                        16.0000    0.6638     0.4542     0.3194     0.2569     0.2688     0.3617     0.5420     0.8019     1.1315     1.5164
                        20.0000    0.5128     0.3342     0.2265     0.1901     0.2300     0.3564     0.5683     0.8560     1.2076     1.6065
                        24.0000    0.3624     0.2112     0.1285     0.1178     0.1882     0.3500     0.5925     0.9062     1.2764     1.6864
                        28.0000    0.2137     0.0861     0.0261     0.0398     0.1489     0.3426     0.6136     0.9499     1.3360     1.7488
                    </tableData>
                </table>
            </product>
        </function>


        <axis name="SIDE">

            <!-- modified -->
            <function name="aero/coefficient/Cyb">
                <description>
                    Side Force coefficient due to Sideslip(per degree)
                    Contributes to damping of Dutch Roll mode
                </description>
                <product>
                    <property>aero/qbar-psf</property>
                    <property>metrics/Sw-sqft</property>
                    <property>aero/beta-deg</property>
                    <table>
                        <independentVar lookup="row">aero/alpha-deg</independentVar>
                        <tableData>
                            0.00     -0.1931
                            4.00     -0.2020
                            8.00     -0.2089
                            12.00     -0.2092
                            16.00     -0.1980
                            20.00     -0.1841
                            24.00     -0.1690
                            28.00     -0.1595
                        </tableData>
                    </table>
                </product>
            </function>

            <!-- NOT IN DATCOM OUTPUT
         <function name="aero/coefficient/Cyp">
            <description>
               Side Force Coefficient due to Roll Rate(per degree)
            </description>
            <product>
               <property>velocities/p-aero-rad_sec</property>
               <value>57.29577951</value>
               <property>aero/qbar-psf</property>
               <property>metrics/Sw-sqft</property>
               <property>aero/bi2vel</property>
               <table>
                  <independentVar lookup="row">aero/alpha-deg</independentVar>
                  <tableData>
                       -16.00          .000
                       -8.000          .000
                       -6.000          .000
                       -4.000          .000
                       -2.000          .000
                         .000          .000
                        2.000          .000
                        4.000          .000
                        8.000          .000
                        9.000          .000
                        10.00          .000
                        12.00          .000
                        14.00          .000
                        16.00          .000
                        18.00          .000
                        19.00          .000
                        20.00          .000
                        21.00          .000
                        22.00          .000
                        24.00          .000
                  </tableData>
               </table>
            </product>
         </function>
    -->


         <!-- *************************
              Not calculated by DATCOM+
              *************************
         -->

         <function name="aero/coefficient/Cyr">
             <description>
                 Side Force due to Yaw Rate(DATCOM does not calculate)
                 Effect is small
             </description>
             <product>
                 <property>velocities/r-aero-rad_sec</property>
                 <property>aero/qbar-psf</property>
                 <property>metrics/Sw-sqft</property>
                 <property>aero/bi2vel</property>
                 <value>    .000    </value>
             </product>
         </function>


         <!-- *************************
              Not calculated by DATCOM+
              *************************
         -->

         <function name="aero/coefficient/CyDr">
             <description>
                 Side Force due to rudder(DATCOM does not calculate)
             </description>
             <product>
                 <property>aero/qbar-psf</property>
                 <property>metrics/Sw-sqft</property>
                 <property>fcs/rudder-pos-deg</property>
                 <value>    .000    </value>
             </product>
         </function>


         <!-- *************************
              Not calculated by DATCOM+
              *************************
         -->

         <function name="aero/coefficient/CyDa">
             <description>
                 Side Force due to aileron(DATCOM does not calculate)
                 Usually neglected
             </description>
             <product>
                 <property>aero/qbar-psf</property>
                 <property>metrics/Sw-sqft</property>
                 <property>fcs/left-aileron-pos-deg</property>
                 <value>    .000    </value>
             </product>
         </function>

     </axis>


<!-- ********************************************************************** -->


     <axis name="ROLL">


         <!-- NOT IN DATCOM OUTPUT
         <function name="aero/coefficient/Clb">
            <description>
               Roll Moment coefficient due to Beta(per degree)
               Decrease of Clb to small negative value improves Dutch Roll Damping
               High Positive value leads to excessive spiral instability
            </description>
            <product>
               <property>aero/qbar-psf</property>
               <property>metrics/Sw-sqft</property>
               <property>metrics/bw-ft</property>
               <property>aero/beta-deg</property>
               <table>
                  <independentVar lookup="row">aero/alpha-deg</independentVar>
                  <tableData>
                       -16.00         .5044E-03
                       -8.000         .2207E-03
                       -6.000         .1387E-03
                       -4.000         .5411E-04
                       -2.000        -.3092E-04
                         .000        -.1101E-03
                        2.000        -.1773E-03
                        4.000        -.2322E-03
                        8.000        -.2741E-03
                        9.000        -.2632E-03
                        10.00        -.1871E-03
                        12.00         .5827E-04
                        14.00         .2470E-03
                        16.00         .3838E-03
                        18.00         .4949E-03
                        19.00         .5421E-03
                        20.00         .5713E-03
                        21.00         .5875E-03
                        22.00         .6051E-03
                        24.00         .6379E-03
                  </tableData>
               </table>
            </product>
         </function>
    -->

    <!-- NOT IN DATCOM OUTPUT
         <function name="aero/coefficient/Clp">
            <description>
               Roll Moment coefficient due to roll rate(per degree)
               Clp alone determines damping-in-roll characteristics
            </description>
            <product>
               <property>aero/qbar-psf</property>
               <property>metrics/Sw-sqft</property>
               <property>metrics/bw-ft</property>
               <property>aero/bi2vel</property>
               <property>velocities/p-aero-rad_sec</property>
               <table>
                  <independentVar lookup="row">aero/alpha-deg</independentVar>
                  <tableData>
                       -16.00          .000
                       -8.000          .000
                       -6.000          .000
                       -4.000          .000
                       -2.000          .000
                         .000          .000
                        2.000          .000
                        4.000          .000
                        8.000          .000
                        9.000          .000
                        10.00          .000
                        12.00          .000
                        14.00          .000
                        16.00          .000
                        18.00          .000
                        19.00          .000
                        20.00          .000
                        21.00          .000
                        22.00          .000
                        24.00          .000
                  </tableData>
               </table>
            </product>
         </function>
    -->

    <!-- NOT IN DATCOM OUTPUT
         <function name="aero/coefficient/Clr">
            <description>
               Roll Moment coefficient due to yaw rate(per degree)
               Considerable effect on Spiral mode. Large
               positive values leads to strong sprial instability.
            </description>
            <product>
               <property>aero/qbar-psf</property>
               <property>metrics/Sw-sqft</property>
               <property>metrics/bw-ft</property>
               <property>aero/bi2vel</property>
               <property>velocities/r-aero-rad_sec</property>
               <table>
                  <independentVar lookup="row">aero/alpha-deg</independentVar>
                  <tableData>
                       -16.00          .000
                       -8.000          .000
                       -6.000          .000
                       -4.000          .000
                       -2.000          .000
                         .000          .000
                        2.000          .000
                        4.000          .000
                        8.000          .000
                        9.000          .000
                        10.00          .000
                        12.00          .000
                        14.00          .000
                        16.00          .000
                        18.00          .000
                        19.00          .000
                        20.00          .000
                        21.00          .000
                        22.00          .000
                        24.00          .000
                  </tableData>
               </table>
            </product>
         </function>
    -->

    <!--modified-->

    <function name="aero/coefficient/CldF1">
        <description>
            Roll Moment coefficient due to Fin Set 1
        </description>
        <product>
            <property>aero/qbar-psf</property>
            <property>metrics/Sw-sqft</property>
            <property>metrics/bw-ft</property>
            <value>0.000</value>
        </product>
    </function>

    <!--modified-->
    <function name="aero/coefficient/CldF1">
        <description>
            Roll Moment coefficient due to Fin Set 2
        </description>
        <product>
            <property>aero/qbar-psf</property>
            <property>metrics/Sw-sqft</property>
            <property>metrics/bw-ft</property>
            <value>0.000</value>
        </product>
    </function>

</axis>


<!-- ********************************************************************** -->


     <axis name="PITCH">


         <!-- modified -->
         <function name="aero/coefficient/Cm_basic">
             <description>
                 Basic_Pitch_moment_coefficient
             </description>
             <product>
                 <property>aero/qbar-psf</property>
                 <property>metrics/Sw-sqft</property>
                 <property>metrics/cbarw-ft</property>
                 <table>
                     <independentVar lookup="row">aero/alpha-deg</independentVar>
                     <tableData>
                         0.00     0.000
                         4.00     -1.462
                         8.00     -2.967
                         12.00     -4.723
                         16.00     -6.531
                         20.00     -8.383
                         24.00     -10.194
                         28.00     -12.031
                     </tableData>
                 </table>
             </product>
         </function>

         <!-- NOT IN DATCOM OUTPUT
         <function name="aero/coefficient/Cmq">
            <description>
               Pitch moment coefficient due to pitch rate(per degree)
                Pitch Damping Derivative
               Very important to Short Period damping of oscillations
            </description>
            <product>
               <property>aero/qbar-psf</property>
               <property>metrics/Sw-sqft</property>
               <property>metrics/cbarw-ft</property>
               <property>aero/ci2vel</property>
               <property>velocities/q-aero-rad_sec</property>
               <table>
                  <independentVar lookup="row">aero/alpha-deg</independentVar>
                  <tableData>
                       -16.00        -.1354
                       -8.000        -.1354
                       -6.000        -.1354
                       -4.000        -.1354
                       -2.000        -.1354
                         .000        -.1354
                        2.000        -.1354
                        4.000        -.1354
                        8.000        -.1354
                        9.000        -.1354
                        10.00        -.1354
                        12.00        -.1354
                        14.00        -.1354
                        16.00        -.1354
                        18.00        -.1354
                        19.00        -.1354
                        20.00        -.1354
                        21.00        -.1354
                        22.00        -.1354
                        24.00        -.1354
                  </tableData>
               </table>
            </product>
         </function>
    -->

    <!-- modified -->
    <function name="aero/coefficient/Cmadot">
        <description>
            Pitch moment coefficient due to AOA rate(per degree)
            Negitive Cmad increase Short Period damping
        </description>
        <product>
            <property>aero/qbar-psf</property>
            <property>metrics/Sw-sqft</property>
            <property>metrics/cbarw-ft</property>
            <property>aero/ci2vel</property>
            <property>aero/alphadot-deg_sec</property>
            <table>
                <independentVar lookup="row">aero/alpha-deg</independentVar>
                <tableData>
                    0.00      -0.3603
                    4.00      -0.3709
                    8.00      -0.4073
                    12.00      -0.4454
                    16.00      -0.4575
                    20.00      -0.4579
                    24.00      -0.4559
                    28.00      -0.4624
                </tableData>
            </table>
        </product>
    </function>

    <function name="aero/coefficient/CmDf2">
        <description>
            Pitch moment coefficient due to fin 2 deflection
        </description>
        <product>
            <property>aero/qbar-psf</property>
            <property>metrics/Sw-sqft</property>
            <property>metrics/bw-ft</property>
            <table>
                <independentVar lookup="row">aero/alpha-deg</independentVar>
                <independentVar lookup="column">fcs/fin2-pos-deg</independentVar>
                <tableData>
                    0.0000     -25.0000   -20.0000   -15.0000   -10.0000   -5.0000    0.0000     5.0000     10.0000     15.0000     20.0000
                    0.0000     10.2558    8.5066     6.3563     4.1899     2.0809     0.0000     -2.0809    -4.1899     -6.3563     -8.5066
                    4.0000     8.8479     6.8503     4.7552     2.6904     0.6268     -1.4625    -3.6062    -5.8355     -8.1239     -10.0284
                    8.0000     7.3297     5.3105     3.3020     1.2704     -0.8098    -2.9675    -5.2358    -7.6414     -9.6972     -11.4811
                    12.0000    5.6855     3.7521     1.7707     -0.2823    -2.4356    -4.7233    -7.2029    -9.4056     -11.3596    -12.9879
                    16.0000    4.2531     2.3409     0.3383     -1.7814    -4.0511    -6.5309    -8.9042    -11.0227    -12.8526    -14.3101
                    20.0000    2.8054     0.8730     -1.1935    -3.4256    -5.8680    -8.3834    -10.6357   -12.6439    -14.3198    -15.5799
                    24.0000    1.3263     -0.6680    -2.8439    -5.2411    -7.8442    -10.1943   -12.3549   -14.2262    -15.7115    -16.7632
                    28.0000    -0.2530    -2.3506    -4.6834    -7.3088    -9.7419    -12.0308   -14.0760   -15.7750    -17.0693    -17.8401
                </tableData>
            </table>
        </product>
    </function>

</axis>


<!-- ********************************************************************** -->


     <axis name="YAW">


         <!-- modified -->
         <function name="aero/coefficient/Cnb">
             <description>
                 Yaw moment coefficient due to sideslip(per degree)
                 Determines Dutch Roll and Spiral characteristics
                 Prevents side-slip and yawing moments
             </description>
             <product>
                 <property>aero/qbar-psf</property>
                 <property>metrics/Sw-sqft</property>
                 <property>metrics/bw-ft</property>
                 <property>aero/beta-deg</property>
                 <table>
                     <independentVar lookup="row">aero/alpha-deg</independentVar>
                     <tableData>
                         0.00      0.4605
                         4.00      0.4512
                         8.00      0.4212
                         12.00      0.3321
                         16.00      0.1993
                         20.00      0.0913
                         24.00      0.0214
                         28.00      -0.0245
                     </tableData>
                 </table>
             </product>
         </function>

         <!-- NOT IN DATCOM OUTPUT
         <function name="aero/coefficient/Cnp">
            <description>
               Yaw moment coefficient due to roll rate(per degree)
               Reduces Dutch Roll damping
               positive value desireable
            </description>
            <product>
               <property>aero/qbar-psf</property>
               <property>metrics/Sw-sqft</property>
               <property>metrics/bw-ft</property>
               <property>aero/bi2vel</property>
               <property>velocities/p-aero-rad_sec</property>
               <table>
                  <independentVar lookup="row">aero/alpha-deg</independentVar>
                  <tableData>
                       -16.00          .000
                       -8.000          .000
                       -6.000          .000
                       -4.000          .000
                       -2.000          .000
                         .000          .000
                        2.000          .000
                        4.000          .000
                        8.000          .000
                        9.000          .000
                        10.00          .000
                        12.00          .000
                        14.00          .000
                        16.00          .000
                        18.00          .000
                        19.00          .000
                        20.00          .000
                        21.00          .000
                        22.00          .000
                        24.00          .000
                  </tableData>
               </table>
            </product>
         </function>
    -->

    <!-- NOT IN DATCOM OUTPUT
         <function name="aero/coefficient/Cnr">
            <description>
               Yaw Moment coefficient due to yaw rate(per degree)
               Main contributor to damping of Dutch Roll
            </description>
            <product>
               <property>aero/qbar-psf</property>
               <property>metrics/Sw-sqft</property>
               <property>metrics/bw-ft</property>
               <property>aero/bi2vel</property>
               <property>velocities/r-aero-rad_sec</property>
               <table>
                  <independentVar lookup="row">aero/alpha-deg</independentVar>
                  <tableData>
                       -16.00          .000
                       -8.000          .000
                       -6.000          .000
                       -4.000          .000
                       -2.000          .000
                         .000          .000
                        2.000          .000
                        4.000          .000
                        8.000          .000
                        9.000          .000
                        10.00          .000
                        12.00          .000
                        14.00          .000
                        16.00          .000
                        18.00          .000
                        19.00          .000
                        20.00          .000
                        21.00          .000
                        22.00          .000
                        24.00          .000
                  </tableData>
               </table>
            </product>
         </function>
    -->

     </axis>


<!-- ********************************************************************** -->


      <function name="aero/elev_hinge_moment_ft_lbs">
          <description>
              Elevator hinge moment in ft-lbs
              HM = q * S * Cbar * ( Ch0 + Cha*alpha + Chd*delta )
              Positive causes trailing edge down movement
              Ch0 is used to artifically trim HM to zero
          </description>
          <product>
              <property>aero/qbar-psf</property>
              <property>metrics/Sw-sqft</property>
              <value>   .8610    </value>	<!-- surface area of elevator -->
              <value>   .4200    </value>	<!-- MAC of elevator -->
              <sum>
                  <!--
               <property>aero/Ch0_elev</property>
 -->
               <product>
                   <property>aero/alpha-deg</property>
                   <table>                            	<!-- Ch-alpha -->
                       <independentVar lookup="row">
                           aero/alpha-deg</independentVar>
                       <tableData>
                           -16.00    	   .8897E-02
                           -8.000    	   .8897E-02
                           -6.000    	   .8897E-02
                           -4.000    	   .8897E-02
                           -2.000    	   .8897E-02
                           .000    	   .8897E-02
                           2.000    	   .8897E-02
                           4.000    	   .8897E-02
                           8.000    	   .8897E-02
                           9.000    	   .8897E-02
                           10.00    	   .2357E-01
                           12.00    	   .2293E-01
                           14.00    	   .2282E-01
                           16.00    	   .2282E-01
                           18.00    	   .2282E-01
                           19.00    	   .2282E-01
                           20.00    	   .2282E-01
                           21.00    	   .2286E-01
                           22.00    	   .2298E-01
                           24.00    	   .2282E-01
                       </tableData>
                   </table>
               </product>
               <product>
                   <property>fcs/elevator-pos-deg</property>
                   <table>                            	<!-- Ch-delta elevator -->
                       <independentVar lookup="row">
                           fcs/elevator-pos-deg</independentVar>
                       <tableData>
                           -20.00    	   .2357E-01
                           -15.00    	   .2293E-01
                           -10.00    	   .2282E-01
                           -5.000    	   .2282E-01
                           .000    	   .2282E-01
                           5.000    	   .2282E-01
                           10.00    	   .2282E-01
                           13.00    	   .2286E-01
                           16.00    	   .2298E-01
                       </tableData>
                   </table>
               </product>
           </sum>
       </product>
   </function>

   </aerodynamics>
