<?xml version="1.0"?>
<!-- Generated by Aero-Matic v 1.1

     Inputs:
                horsepower: 1890
                     pitch: fixed
            max engine rpm: 2100
        prop diameter (ft): 7.6666666666667

     Outputs:
              max prop rpm: 2447.35
                gear ratio:    0.86
                       Cp0: 0.243190
                       Ct0: 0.340467
       static thrust (lbs): 4986.06
-->

<propeller name="prop">
    <ixx>   8.57 </ixx>
    <!--<ixx>   5 </ixx>-->
    <diameter unit="IN">  92.0 </diameter>
    <numblades> 5 </numblades>
    <gearratio>  0.86 </gearratio>
    <p_factor>   7.27 </p_factor>

    <table name="C_THRUST" type="internal">
        <tableData>
            0.0   0.3711
            0.1   0.3558
            0.2   0.3405
            0.3   0.3132
            0.4   0.2812
            0.5   0.2479
            0.6   0.2005
            0.7   0.1522
            0.8   0.0824
            1.0  -0.0279
            1.2  -0.1461
            1.4  -0.2628
        </tableData>
    </table>


    <table name="C_POWER" type="internal">
        <tableData>
            0.0   0.2493
            0.1   0.2493
            0.2   0.2432
            0.3   0.2374
            0.4   0.2237
            0.5   0.2050
            0.6   0.1882
            0.7   0.1581
            0.8   0.1291
            1.0   0.0462
            1.2  -0.0737
            1.4  -0.2218
            1.6  -0.3765
        </tableData>
    </table>

    <!-- thrust effects of helical tip Mach -->
    <table name="CT_MACH" type="internal">
        <tableData>
            0.85   1.0
            1.05   0.8
        </tableData>
    </table>

    <!-- power-required effects of helical tip Mach -->
    <table name="CP_MACH" type="internal">
        <tableData>
            0.85   1.0
            1.05   1.8
            2.00   1.4
        </tableData>
    </table>

</propeller>
