<?xml version="1.0"?>
<?xml-stylesheet type="text/xsl" href="http://jsbsim.sourceforge.net/JSBSim.xsl"?>

<aerodynamics>

    <axis name="DRAG">
        <function name="aero/coefficient/CD0">
            <description>Drag_at_zero_lift</description>
            <product>
                <property>aero/qbar-psf</property>
                <property>metrics/Sw-sqft</property>
                <table>
                    <independentVar>aero/alpha-rad</independentVar>
                    <tableData>
                        -1.5700	1.6590
                        -0.2600	0.0580
                        0.0000	0.0488
                        0.2600	0.0580
                        1.5700	1.6590
                    </tableData>
                </table>
            </product>
        </function>
        <function name="aero/coefficient/CDi">
            <description>Induced_drag</description>
            <product>
                <property>aero/qbar-psf</property>
                <property>metrics/Sw-sqft</property>
                <property>aero/cl-squared</property>
                <value>0.0390</value>
            </product>
        </function>
        <function name="aero/coefficient/CDmach">
            <description>Drag_due_to_mach</description>
            <product>
                <property>aero/qbar-psf</property>
                <property>metrics/Sw-sqft</property>
                <table>
                    <independentVar>velocities/mach</independentVar>
                    <tableData>
                        0.0000	0.0000
                        0.7000	0.0000
                        1.1000	0.0230
                        1.8000	0.0150
                    </tableData>
                </table>
            </product>
        </function>
        <function name="aero/coefficient/CDflap">
            <description>Drag_due_to_flaps</description>
            <product>
                <property>aero/qbar-psf</property>
                <property>metrics/Sw-sqft</property>
                <property>fcs/flap-pos-norm</property>
                <value>0.0350</value>
            </product>
        </function>
        <function name="aero/coefficient/CDsb">
            <description>Drag_due_to_speedbrakes</description>
            <product>
                <property>aero/qbar-psf</property>
                <property>metrics/Sw-sqft</property>
                <property>fcs/speedbrake-pos-norm</property>
                <value>0.0280</value>
            </product>
        </function>
        <function name="aero/coefficient/CDbeta">
            <description>Drag_due_to_sideslip</description>
            <product>
                <property>aero/qbar-psf</property>
                <property>metrics/Sw-sqft</property>
                <table>
                    <independentVar>aero/beta-rad</independentVar>
                    <tableData>
                        -1.5700	1.2300
                        -0.2600	0.0500
                        0.0000	0.0000
                        0.2600	0.0500
                        1.5700	1.2300
                    </tableData>
                </table>
            </product>
        </function>
        <function name="aero/coefficient/CDde">
            <description>Drag_due_to_Elevator_Deflection</description>
            <product>
                <property>aero/qbar-psf</property>
                <property>metrics/Sw-sqft</property>
                <property>fcs/elevator-pos-norm</property>
                <value>0.0350</value>
            </product>
        </function>
    </axis>

    <axis name="SIDE">
        <function name="aero/coefficient/CYb">
            <description>Side_force_due_to_beta</description>
            <product>
                <property>aero/qbar-psf</property>
                <property>metrics/Sw-sqft</property>
                <property>aero/beta-rad</property>
                <value>-0.6000</value>
            </product>
        </function>
        <function name="aero/coefficient/CYdr">
            <description>Side_force_due_to_rudder</description>
            <product>
                <property>aero/qbar-psf</property>
                <property>metrics/Sw-sqft</property>
                <property>fcs/rudder-pos-rad</property>
                <value>0.1500</value>
            </product>
        </function>
        <function name="aero/coefficient/CYp">
            <description>Side_force_due_to_roll_rate</description>
            <product>
                <property>aero/qbar-psf</property>
                <property>metrics/Sw-sqft</property>
                <property>aero/bi2vel</property>
                <property>velocities/p-aero-rad_sec</property>
                <value>-0.2000</value>
            </product>
        </function>
        <function name="aero/coefficient/CYr">
            <description>Side_force_due_to_yaw_rate</description>
            <product>
                <property>aero/qbar-psf</property>
                <property>metrics/Sw-sqft</property>
                <property>aero/bi2vel</property>
                <property>velocities/r-aero-rad_sec</property>
                <value>0.4000</value>
            </product>
        </function>
    </axis>

    <axis name="LIFT">
        <function name="aero/coefficient/CLalpha">
            <description>Lift_due_to_alpha</description>
            <product>
                <property>aero/qbar-psf</property>
                <property>metrics/Sw-sqft</property>
                <table>
                    <independentVar>aero/alpha-rad</independentVar>
                    <tableData>
                        -0.3491	-0.5800
                        -0.2618	-0.5200
                        -0.1745	-0.4500
                        -0.1396	-0.2800
                        -0.1047	-0.2000
                        -0.0698	0.1600
                        -0.0349	0.3200
                        0.0000	0.4400
                        0.0349	0.5800
                        0.0698	0.7500
                        0.1047	0.8100
                        0.1396	0.9500
                        0.1745	1.1000
                        0.2094	1.1250
                        0.2443	1.1400
                        0.2793	1.1600
                        0.3142	1.1200
                        0.3491	1.1300
                        0.4363	1.1700
                        0.5236	1.2099
                        0.6109	1.2699
                        0.6981	1.3999
                    </tableData>
                </table>
            </product>
        </function>
        <function name="aero/coefficient/dCLflap">
            <description>Delta_Lift_due_to_flaps</description>
            <product>
                <property>aero/qbar-psf</property>
                <property>metrics/Sw-sqft</property>
                <table>
                    <independentVar>fcs/flap-pos-deg</independentVar>
                    <tableData>
                        0.0000	0.0000
                        10.0000	0.9250
                        20.0000	1.1890
                        30.0000	1.4750
                        40.0000	1.6330
                    </tableData>
                </table>
            </product>
        </function>
        <function name="aero/coefficient/dCLsb">
            <description>Delta_Lift_due_to_speedbrake</description>
            <product>
                <property>aero/qbar-psf</property>
                <property>metrics/Sw-sqft</property>
                <property>fcs/speedbrake-pos-norm</property>
                <value>0.0000</value>
            </product>
        </function>
        <function name="aero/coefficient/CLde">
            <description>Lift_due_to_Elevator_Deflection</description>
            <product>
                <property>aero/qbar-psf</property>
                <property>metrics/Sw-sqft</property>
                <property>fcs/elevator-pos-rad</property>
                <value>0.6080</value>
            </product>
        </function>
        <function name="aero/coefficient/CLq">
            <description>Lift_due_to_pitch_rate</description>
            <product>
                <property>aero/qbar-psf</property>
                <property>metrics/Sw-sqft</property>
                <property>velocities/q-aero-rad_sec</property>
                <property>aero/ci2vel</property>
                <value>19.9700</value>
            </product>
        </function>
    </axis>

    <axis name="ROLL">
        <function name="aero/coefficient/Clb">
            <description>Roll_moment_due_to_beta</description>
            <product>
                <property>aero/qbar-psf</property>
                <property>metrics/Sw-sqft</property>
                <property>metrics/bw-ft</property>
                <table>
                    <independentVar lookup="row">aero/beta-rad</independentVar>
                    <independentVar lookup="column">aero/alpha-rad</independentVar>
                    <tableData>
                        0.0698	0.1745	0.2443	0.3491
                        -0.3491	0.1250	0.0450	0.0240	-0.0270
                        -0.2618	0.0900	0.0220	0.0030	-0.0150
                        -0.1745	0.0770	0.0200	-0.0100	0.0000
                        -0.0873	0.0360	0.0270	-0.0220	-0.0080
                        0.0000	0.0000	-0.0100	0.0200	-0.0060
                        0.0873	-0.0360	-0.0170	0.0200	-0.0100
                        0.1745	-0.0770	-0.0100	0.0050	-0.0100
                        0.2618	-0.0900	-0.0250	-0.0180	0.0000
                        0.3491	-0.1250	-0.0450	-0.0350	0.0200
                    </tableData>
                </table>
            </product>
        </function>
        <function name="aero/coefficient/Clp">
            <description>Roll_moment_due_to_roll_rate</description>
            <product>
                <property>aero/qbar-psf</property>
                <property>metrics/Sw-sqft</property>
                <property>metrics/bw-ft</property>
                <property>aero/bi2vel</property>
                <property>velocities/p-aero-rad_sec</property>
                <value>-0.5000</value>
            </product>
        </function>
        <function name="aero/coefficient/Clr">
            <description>Roll_moment_due_to_yaw_rate</description>
            <product>
                <property>aero/qbar-psf</property>
                <property>metrics/Sw-sqft</property>
                <property>metrics/bw-ft</property>
                <property>aero/bi2vel</property>
                <property>velocities/r-aero-rad_sec</property>
                <value>0.0600</value>
            </product>
        </function>
        <function name="aero/coefficient/Clda">
            <description>Roll_moment_due_to_aileron</description>
            <product>
                <property>aero/qbar-psf</property>
                <property>metrics/Sw-sqft</property>
                <property>metrics/bw-ft</property>
                <property>fcs/left-aileron-pos-rad</property>
                <table>
                    <independentVar>velocities/mach</independentVar>
                    <tableData>
                        0.0000	0.1500
                        2.0000	0.0500
                    </tableData>
                </table>
            </product>
        </function>
        <function name="aero/coefficient/Cldr">
            <description>Roll_moment_due_to_rudder</description>
            <product>
                <property>aero/qbar-psf</property>
                <property>metrics/Sw-sqft</property>
                <property>metrics/bw-ft</property>
                <property>fcs/rudder-pos-rad</property>
                <value>0.0150</value>
            </product>
        </function>
    </axis>

    <axis name="PITCH">
        <function name="aero/coefficient/Cmalpha">
            <description>Pitch_moment_due_to_alpha_and_elevator_and_flaps</description>
            <product>
                <property>aero/qbar-psf</property>
                <property>metrics/Sw-sqft</property>
                <property>metrics/cbarw-ft</property>
                <table>
                    <independentVar lookup="row">aero/alpha-rad</independentVar>
                    <independentVar lookup="column">fcs/elevator-pos-rad</independentVar>
                    <independentVar lookup="table">fcs/flap-pos-deg</independentVar>
                    <tableData breakPoint="0.0">
                        -0.4538	-0.2269	0.0000	0.1222	0.2443
                        -0.3491	0.2800	0.1700	0.0000	-0.1000	-0.2200
                        -0.2618	0.2000	0.0900	0.0000	-0.0900	-0.2800
                        -0.1745	0.4300	0.3100	0.0000	-0.1700	-0.3700
                        -0.1396	0.5100	0.3700	0.0000	-0.1900	-0.3800
                        -0.1047	0.5300	0.3900	0.0000	-0.2000	-0.3800
                        -0.0698	0.5600	0.4000	0.0000	-0.2000	-0.3900
                        -0.0349	0.5900	0.4100	0.0000	-0.2000	-0.3800
                        0.0000	0.6300	0.4000	0.0000	-0.1900	-0.3800
                        0.0349	0.6400	0.3900	0.0000	-0.2000	-0.3600
                        0.0698	0.6500	0.4000	0.0000	-0.1900	-0.3400
                        0.1047	0.6400	0.3800	0.0000	-0.1800	-0.3200
                        0.1396	0.5800	0.3600	0.0000	-0.1600	-0.3200
                        0.1745	0.5900	0.3700	0.0000	-0.2100	-0.3200
                        0.2094	0.5600	0.3500	0.0000	-0.2100	-0.3400
                        0.2443	0.5400	0.3400	0.0000	-0.1900	-0.2900
                        0.2793	0.4800	0.3300	0.0000	-0.1700	-0.2600
                        0.3142	0.4300	0.3100	0.0000	-0.1500	-0.2300
                        0.3491	0.4600	0.3000	0.0000	-0.2100	-0.2000
                        0.4363	0.2600	0.2100	0.0000	-0.0800	-0.1400
                        0.5236	0.2900	0.1900	0.0000	-0.0900	-0.1900
                        0.6109	0.3800	0.2400	0.0000	-0.0800	-0.1600
                        0.6981	0.4200	0.2300	0.0000	-0.0900	-0.1800
                    </tableData>
                    <tableData breakPoint="20.0">
                        -0.4538	-0.2269	0.0000	0.1222	0.2443
                        -0.3491	0.3300	0.1800	0.0000	-0.4000	-0.1900
                        -0.2618	0.3000	0.2100	0.0000	-0.2000	-0.2200
                        -0.1745	0.4400	0.2400	0.0000	-0.1500	-0.3800
                        -0.1396	0.4800	0.2800	0.0000	-0.1700	-0.3600
                        -0.1047	0.4700	0.3000	0.0000	-0.1700	-0.3500
                        -0.0698	0.4600	0.3200	0.0000	-0.1900	-0.3700
                        -0.0349	0.4500	0.3500	0.0000	-0.2000	-0.3900
                        0.0000	0.5300	0.3600	0.0000	-0.2000	-0.4000
                        0.0349	0.5700	0.3800	0.0000	-0.2000	-0.3800
                        0.0698	0.5900	0.3900	0.0000	-0.2000	-0.3600
                        0.1047	0.6200	0.3800	0.0000	-0.2000	-0.3500
                        0.1396	0.5700	0.3500	0.0000	-0.1500	-0.2900
                        0.1745	0.4900	0.2900	0.0000	-0.1300	-0.2800
                        0.2094	0.4700	0.2700	0.0000	-0.1200	-0.2700
                        0.2443	0.4500	0.2500	0.0000	-0.1300	-0.2700
                        0.2793	0.4100	0.2300	0.0000	-0.1400	-0.2800
                        0.3142	0.4200	0.2500	0.0000	-0.1200	-0.3100
                        0.3491	0.4100	0.2300	0.0000	-0.1500	-0.2700
                        0.4363	0.3200	0.1900	0.0000	-0.0900	-0.1300
                        0.5236	0.2400	0.2000	0.0000	-0.0600	-0.1300
                        0.6109	0.2700	0.1600	0.0000	-0.0800	-0.1700
                        0.6981	0.3600	0.2100	0.0000	-0.0700	-0.1500
                    </tableData>
                    <tableData breakPoint="40.0">
                        -0.4538	-0.2269	0.0000	0.1222	0.2443
                        -0.3491	0.2900	0.1700	0.0000	-0.0700	-0.2200
                        -0.2618	0.2000	0.0900	0.0000	-0.0700	-0.2600
                        -0.1745	0.1800	0.2100	0.0000	-0.1600	-0.3200
                        -0.1396	0.3600	0.2900	0.0000	-0.1800	-0.3600
                        -0.1047	0.4800	0.3300	0.0000	-0.2000	-0.3800
                        -0.0698	0.5000	0.3600	0.0000	-0.2000	-0.3800
                        -0.0349	0.5300	0.3700	0.0000	-0.2000	-0.3600
                        0.0000	0.5600	0.3800	0.0000	-0.1900	-0.3400
                        0.0349	0.6000	0.3900	0.0000	-0.1700	-0.2900
                        0.0698	0.6400	0.2600	0.0000	-0.1500	-0.2600
                        0.1047	0.5900	0.2400	0.0000	-0.1300	-0.2400
                        0.1396	0.5300	0.2400	0.0000	-0.1100	-0.2000
                        0.1745	0.4200	0.2200	0.0000	-0.1000	-0.2100
                        0.2094	0.4100	0.2100	0.0000	-0.1100	-0.2400
                        0.2443	0.4400	0.2200	0.0000	-0.1300	-0.2300
                        0.2793	0.4200	0.2500	0.0000	-0.1100	-0.2000
                        0.3142	0.4800	0.2800	0.0000	-0.1000	-0.2000
                        0.3491	0.1800	0.2100	0.0000	-0.0800	-0.1900
                        0.4363	0.2400	0.1900	0.0000	-0.1200	-0.1600
                        0.5236	0.2800	0.1800	0.0000	-0.0700	-0.1400
                        0.6109	0.3600	0.1800	0.0000	-0.1000	-0.1700
                        0.6981	0.3900	0.2100	0.0000	-0.0900	-0.1300
                    </tableData>
                </table>
            </product>
        </function>
        <function name="aero/coefficient/Cmq">
            <description>Pitch_moment_due_to_pitch_rate</description>
            <product>
                <property>aero/qbar-psf</property>
                <property>metrics/Sw-sqft</property>
                <property>metrics/cbarw-ft</property>
                <property>aero/ci2vel</property>
                <property>velocities/q-aero-rad_sec</property>
                <value>-34.2000</value>
            </product>
        </function>
        <function name="aero/coefficient/Cmadot">
            <description>Pitch_moment_due_to_alpha_rate</description>
            <product>
                <property>aero/qbar-psf</property>
                <property>metrics/Sw-sqft</property>
                <property>metrics/cbarw-ft</property>
                <property>aero/ci2vel</property>
                <property>aero/alphadot-rad_sec</property>
                <value>-8.0000</value>
            </product>
        </function>
    </axis>

    <axis name="YAW">
        <function name="aero/coefficient/Cnb">
            <description>Yaw_moment_due_to_beta</description>
            <product>
                <property>aero/qbar-psf</property>
                <property>metrics/Sw-sqft</property>
                <property>metrics/bw-ft</property>
                <property>aero/beta-rad</property>
                <value>0.1000</value>
            </product>
        </function>
        <function name="aero/coefficient/Cnr">
            <description>Yaw_moment_due_to_yaw_rate</description>
            <product>
                <property>aero/qbar-psf</property>
                <property>metrics/Sw-sqft</property>
                <property>metrics/bw-ft</property>
                <property>aero/bi2vel</property>
                <property>velocities/r-aero-rad_sec</property>
                <value>-0.1800</value>
            </product>
        </function>
        <function name="aero/coefficient/Cnp">
            <description>Yaw_moment_due_to_roll_rate</description>
            <product>
                <property>aero/qbar-psf</property>
                <property>metrics/Sw-sqft</property>
                <property>metrics/bw-ft</property>
                <property>aero/bi2vel</property>
                <property>velocities/p-aero-rad_sec</property>
                <value>-0.0600</value>
            </product>
        </function>
        <function name="aero/coefficient/Cndr">
            <description>Yaw_moment_due_to_rudder</description>
            <product>
                <property>aero/qbar-psf</property>
                <property>metrics/Sw-sqft</property>
                <property>metrics/bw-ft</property>
                <property>fcs/rudder-pos-rad</property>
                <value>-0.1250</value>
            </product>
        </function>
        <function name="aero/coefficient/Cnda">
            <description>Adverse_yaw</description>
            <product>
                <property>aero/qbar-psf</property>
                <property>metrics/Sw-sqft</property>
                <property>metrics/bw-ft</property>
                <property>fcs/left-aileron-pos-rad</property>
                <value>-0.0010</value>
            </product>
        </function>
    </axis>
</aerodynamics>
