<?xml version="1.0"?>
<!--
    This is the JSBSim config file for a PA34-200T SenecaII.
    The aerodynamics sections was generated by datcom using
    as much real input as available.

    Changes from datcom.xml

    - function attribute NAME must be lowercase
    - missing function Delta_lift_due_to_flap_deflection in axis LIFT
    - missing function Lift_due_to_Elevator_Deflection in axis LIFT
-->
<?xml-stylesheet href="JSBSim.xsl" type="application/xml"?>
<fdm_config xmlns:xsi="http://www.w3.org/2001/XMLSchema-instance"
    xsi:noNamespaceSchemaLocation="file:/home/torsten/FlightGear/Aircraft/SenecaII/JSBSim.xsd"
    name="waypoint" version="2.0" release="BETA">

    <fileheader>
        <author>James Goppert</author>
        <filecreationdate>2010-6-3</filecreationdate>
        <description>Multiplex Easy Star JSBSim Flight Dynamics Model</description>
        <reference title="Multiplex Easy Star JSBSim Flight Dynamics Model"/>
    </fileheader>

    <!-- **********************************************************************
        METRICS
        ********************************************************************** -->
    <metrics>
    <!-- the eyepoint of the pilot (left or right eye?) -->
      <location name="EYEPOINT" unit="IN">
         <x>  0.0 </x>
         <y>  0.0 </y>
         <z>  0.0 </z>
      </location>
    <!-- the visual reference point of the 3d model -->
      <location name="VRP" unit="IN">
         <x>  0.0 </x>
         <y>  0.0 </y>
         <z>  0.0 </z>
      </location>
   </metrics>

    <!-- **********************************************************************
        MASS_BALANCE
        ********************************************************************** -->
    <mass_balance>
		<ixx unit="SLUG*FT2"> 100</ixx>
        <iyy unit="SLUG*FT2"> 100</iyy>
        <izz unit="SLUG*FT2"> 100</izz>
		<ixz unit="SLUG*FT2"> 0 </ixz>
        <emptywt unit="LBS"> 1000 </emptywt>
        <!-- the center of gravity -->
        <location name="CG" unit="IN">
            <x> 0.0 </x>
            <y> 0.0 </y>
            <z> 0.0 </z>
        </location>
    </mass_balance>
    <!-- **********************************************************************
        UNDERCARRIAGE
        ********************************************************************** -->
    <ground_reactions>
        <contact type="STRUCTURE" name="CENTER">
			<location unit="IN">
				<x> 0 </x>
				<y> 0 </y>
				<z> 0 </z>
			</location>
			<static_friction> 1 </static_friction>
			<dynamic_friction> 1 </dynamic_friction>
			<spring_coeff unit="LBS/FT"> 1000 </spring_coeff>
			<damping_coeff unit="LBS/FT/SEC"> 1000 </damping_coeff>
		</contact>
    </ground_reactions>
    <propulsion>
    </propulsion>
    <aerodynamics>
    </aerodynamics>

</fdm_config>
